*Heading
*Node
      1,           5.,   269.776001
      2,           5.,   258.776001
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**
**
*Element, type=T2D2, elset=EAll
  1,  87, 117
  2, 117,  29
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*Solid Section, elset=EAll, material=MATERIAL-1
1.,
*Material, name=MATERIAL-1
*Elastic
1000.0
**
** ----------------------------------------------------------------
**
** STEP: Step-1
**
*Step, name=Step-1, nlgeom=no
*Static
1., 1., 1e-05, 1.
**
** BOUNDARY CONDITIONS
**
*Boundary
29, 1, 2, 0.0
58, 1, 2, 0.0
87, 1, 2, 0.0
116, 1, 2, 0.0
117, 1, 2, 0.0
125, 1, 2, 0.0
**
** LOADS
**
*Cload
1, 1, 1.0
30, 1, 1.0
88, 1, 1.0
**
** OUTPUT REQUESTS
**
*Restart, write, frequency=0
**
** FIELD OUTPUT: F-Output-1
**
*Output, field, variable=PRESELECT
**
** HISTORY OUTPUT: H-Output-1
**
*Output, history, variable=PRESELECT
*End Step
